OpenVSP model (file version 5), 28 components.
Geometry view with OpenVSP parameter names; values to 6 digits, angles in degrees, lengths in the model's unit.
Overall bounding box: X_Min=0 X_Len=222.214 Y_Min=-105.864 Y_Len=211.727 Z_Min=-18.75 Z_Len=55.3804

Fuselage "Fuselage"
  location (X Y Z) 0 0 0, rotation 0 0 0
  bounding box size 222.214 20.33 20.9375
  Design: Length=222.214
  cross sections:
    n  XLocPercent  YLocPercent  ZLocPercent  shape
    0  0            0            -0.0187733   point
    1  0.153716     0            -0.0018428   ellipse Ellipse_Height=20.7261 Ellipse_Width=20.33
    2  0.708322     0            0.000638816  circle Circle_Diameter=20.0461
    3  0.759294     0            0.00277483   ellipse Ellipse_Height=18.7668 Ellipse_Width=20
    4  0.879647     0            0.00885092   ellipse Ellipse_Height=12.986 Ellipse_Width=13
    5  1            0            0.0151262    ellipse Ellipse_Height=3.77669 Ellipse_Width=0

Fuselage "Gear Pod", child of "Fuselage"
  location (X Y Z) 58 0 -4, rotation 0 0 0
  bounding box size 78 20 15
  Design: Length=78
  cross sections:
    n  XLocPercent  YLocPercent  ZLocPercent  shape
    0  0            0            0            point
    1  0.25         0            0            rounded rectangle RoundRectXSec_Radius=0 RoundedRect_Height=15 RoundedRect_Width=20
    2  0.65         0            0            as above
    3  1            0            0            point

Wing "Vertical"
  location (X Y Z) 167.742 0 7, rotation 90 0 0
  bounding box size 44.3075 1.91946 29.6304
  totals: TotalSpan=29.6304 TotalProjectedSpan=29.6304 TotalChord=20.0698 TotalArea=467.431 TotalAR=1.87827
  root: chord 31.9473, twist 0, NACA 4-series Camber=0 CamberLoc=0.1 ThickChord=0.06
  sections:
    n  Span     Root_Chord  Tip_Chord  Area     Sweep    Sweep_Location  Dihedral  Twist      Twist_Location  tip airfoil
    1  4.53478  31.9473     20.5698    119.077  62.6543  0.285714        0         -0.142857  0.321429        NACA 4-series Camber=0 CamberLoc=0.1 ThickChord=0.08
    2  25.0956  20.5698     7.19238    348.354  45       0               0         0          0               NACA 4-series Camber=0 CamberLoc=0.1 ThickChord=0.06

Wing "Horzantal"
  location (X Y Z) 173 0 2, rotation 8 0 0
  symmetric about XZ
  bounding box size 36.575 70.2001 6.61101
  totals: TotalSpan=70.8 TotalProjectedSpan=70.8 TotalChord=15.5 TotalArea=1097.4 TotalAR=4.56774
  root: chord 23, twist 0, NACA 4-series Camber=0 CamberLoc=0.3 ThickChord=0.12
  sections:
    n  Span  Root_Chord  Tip_Chord  Area   Sweep    Sweep_Location  Dihedral  Twist  Twist_Location  tip airfoil
    1  35.4  23          8          548.7  38.9106  0               0         0      0               NACA 4-series Camber=0 CamberLoc=0.3 ThickChord=0.08

Wing "Wing"
  location (X Y Z) 63.3147 0 -7.5, rotation 3 3 0
  symmetric about XZ
  bounding box size 81.0316 211.727 17.3982
  totals: TotalSpan=214.272 TotalProjectedSpan=212.833 TotalChord=21.25 TotalArea=5073.1 TotalAR=8.929
  root: chord 51.5, twist 0, NACA 4-series Camber=0.02 CamberLoc=0.3 ThickChord=0.15
  sections:
    n  Span     Root_Chord  Tip_Chord  Area     Sweep  Sweep_Location  Dihedral  Twist  Twist_Location  tip airfoil
    1  29.76    51.5        31         1227.6   34     0               9         0      0               NACA 4-series Camber=0.01 CamberLoc=0.3 ThickChord=0.1
    2  7.93601  31          27         230.144  34     0               7         0      0               NACA 4-series Camber=0.01 CamberLoc=0.3 ThickChord=0.09
    3  37.6961  27          14         772.769  34     0               5.5       0      0               NACA 4-series Camber=0.01 CamberLoc=0.3 ThickChord=0.08
    4  26.784   14          7          281.232  34     0               5         0      0               NACA 4-series Camber=0.01 CamberLoc=0.5 ThickChord=0.08
    5  4.96001  7           3          24.8     60     0               5         0      0               as above

Blank "NoseGear"
  location (X Y Z) 19 0 -8, rotation 0 0 0

Fuselage "Gear_Strut", child of "NoseGear"
  location (X Y Z) 19 0 -8, rotation 0 90 0; relative location 0 0 0, rotation 0 90 0
  bounding box size 0.8 0.8 9.68106
  Design: Length=9.5
  cross sections:
    n  XLocPercent  YLocPercent  ZLocPercent  shape
    0  0            0            0            point
    1  0.001        0            0            circle Circle_Diameter=0.8
    2  0.999        0            0            as above
    3  1            0            0            point

Fuselage "Wheel", child of "NoseGear"
  location (X Y Z) 19 0.5184 -17, rotation 0 0 90; relative location 0 0.5184 -9, rotation 0 0 90
  symmetric about XZ
  bounding box size 3.5 4.1472 3.5
  Design: Length=1.5552
  cross sections:
    n  XLocPercent  YLocPercent  ZLocPercent  shape
    0  0            0            0            point
    1  0.35         0            0            circle Circle_Diameter=3.5
    2  0.65         0            0            as above
    3  1            0            0            point

Blank "LeftGear"
  location (X Y Z) 104.5 -18 -5, rotation 0 0 0

Fuselage "Gear_Strut", child of "LeftGear"
  location (X Y Z) 104.5 -18 -5, rotation 0 90 0; relative location 0 0 0, rotation 0 90 0
  bounding box size 0.8 0.8 11.6771
  Design: Length=11.5
  cross sections:
    n  XLocPercent  YLocPercent  ZLocPercent  shape
    0  0            0            0            point
    1  0.001        0            0            circle Circle_Diameter=0.8
    2  0.999        0            0            as above
    3  1            0            0            point

Fuselage "Gear_Strut", child of "Gear_Strut"
  location (X Y Z) 104.5 -18 -13, rotation 135 90 0; relative location 8 0 0, rotation 0 0 135
  bounding box size 0.8 7.48123 7.48123
  Design: Length=10
  cross sections:
    n  XLocPercent  YLocPercent  ZLocPercent  shape
    0  0            0            0            point
    1  0.001        0            0            ellipse Ellipse_Height=0.8 Ellipse_Width=0.4
    2  0.999        0            0            as above
    3  1            0            0            point

Fuselage "Gear_Strut", child of "Gear_Strut"
  location (X Y Z) 109.5 -18 -16.5, rotation -180 0 -180; relative location 11.5 0 5, rotation 0 90 0
  bounding box size 10.1801 0.8 0.8
  Design: Length=10
  cross sections:
    n  XLocPercent  YLocPercent  ZLocPercent  shape
    0  0            0            0            point
    1  0.001        0            0            circle Circle_Diameter=0.8
    2  0.999        0            0            as above
    3  1            0            0            point

Fuselage "Axle", child of "Gear_Strut"
  location (X Y Z) 99.5 -19.5 -16.5, rotation 90 90 0; relative location 11.5 -1.5 -5, rotation 0 0 90
  bounding box size 0.8 3.19401 0.8
  Design: Length=3
  cross sections:
    n  XLocPercent  YLocPercent  ZLocPercent  shape
    0  0            0            0            point
    1  0.001        0            0            circle Circle_Diameter=0.8
    2  0.999        0            0            as above
    3  1            0            0            point

Fuselage "Axle", child of "Gear_Strut"
  location (X Y Z) 104.5 -19.5 -16.5, rotation 90 90 0; relative location 11.5 -1.5 0, rotation 0 0 90
  bounding box size 0.8 3.19401 0.8
  Design: Length=3
  cross sections:
    n  XLocPercent  YLocPercent  ZLocPercent  shape
    0  0            0            0            point
    1  0.001        0            0            circle Circle_Diameter=0.8
    2  0.999        0            0            as above
    3  1            0            0            point

Fuselage "Axle", child of "Gear_Strut"
  location (X Y Z) 109.5 -19.5 -16.5, rotation 90 90 0; relative location 11.5 -1.5 5, rotation 0 0 90
  bounding box size 0.8 3.19401 0.8
  Design: Length=3
  cross sections:
    n  XLocPercent  YLocPercent  ZLocPercent  shape
    0  0            0            0            point
    1  0.001        0            0            circle Circle_Diameter=0.8
    2  0.999        0            0            as above
    3  1            0            0            point

Fuselage "Wheel", child of "LeftGear"
  location (X Y Z) 99.5 -17.3779 -16.5, rotation 0 0 90; relative location -5 0.62208 -11.5, rotation 0 0 90
  symmetric about XZ
  bounding box size 4.5 4.97664 4.5
  Design: Length=1.86624
  cross sections:
    n  XLocPercent  YLocPercent  ZLocPercent  shape
    0  0            0            0            point
    1  0.35         0            0            circle Circle_Diameter=4.5
    2  0.65         0            0            as above
    3  1            0            0            point

Fuselage "Wheel", child of "LeftGear"
  location (X Y Z) 104.5 -17.3779 -16.5, rotation 0 0 90; relative location 0 0.62208 -11.5, rotation 0 0 90
  symmetric about XZ
  bounding box size 4.5 4.97664 4.5
  Design: Length=1.86624
  cross sections:
    n  XLocPercent  YLocPercent  ZLocPercent  shape
    0  0            0            0            point
    1  0.35         0            0            circle Circle_Diameter=4.5
    2  0.65         0            0            as above
    3  1            0            0            point

Fuselage "Wheel", child of "LeftGear"
  location (X Y Z) 109.5 -17.3779 -16.5, rotation 0 0 90; relative location 5 0.62208 -11.5, rotation 0 0 90
  symmetric about XZ
  bounding box size 4.5 4.97664 4.5
  Design: Length=1.86624
  cross sections:
    n  XLocPercent  YLocPercent  ZLocPercent  shape
    0  0            0            0            point
    1  0.35         0            0            circle Circle_Diameter=4.5
    2  0.65         0            0            as above
    3  1            0            0            point

Blank "RightGear"
  location (X Y Z) 104.5 18 -5, rotation 0 0 0

Fuselage "Gear_Strut", child of "RightGear"
  location (X Y Z) 104.5 18 -5, rotation 0 90 0; relative location 0 0 0, rotation 0 90 0
  bounding box size 0.8 0.8 11.6771
  Design: Length=11.5
  cross sections:
    n  XLocPercent  YLocPercent  ZLocPercent  shape
    0  0            0            0            point
    1  0.001        0            0            circle Circle_Diameter=0.8
    2  0.999        0            0            as above
    3  1            0            0            point

Fuselage "Gear_Strut", child of "Gear_Strut"
  location (X Y Z) 104.5 18 -13, rotation -135 90 0; relative location 8 0 0, rotation 0 0 -135
  bounding box size 0.8 7.48123 7.48123
  Design: Length=10
  cross sections:
    n  XLocPercent  YLocPercent  ZLocPercent  shape
    0  0            0            0            point
    1  0.001        0            0            ellipse Ellipse_Height=0.8 Ellipse_Width=0.4
    2  0.999        0            0            as above
    3  1            0            0            point

Fuselage "Gear_Strut", child of "Gear_Strut"
  location (X Y Z) 109.5 18 -16.5, rotation -180 0 -180; relative location 11.5 0 5, rotation 0 90 0
  bounding box size 10.1801 0.8 0.8
  Design: Length=10
  cross sections:
    n  XLocPercent  YLocPercent  ZLocPercent  shape
    0  0            0            0            point
    1  0.001        0            0            circle Circle_Diameter=0.8
    2  0.999        0            0            as above
    3  1            0            0            point

Fuselage "Axle", child of "Gear_Strut"
  location (X Y Z) 99.5 16.5 -16.5, rotation 90 90 0; relative location 11.5 -1.5 -5, rotation 0 0 90
  bounding box size 0.8 3.19401 0.8
  Design: Length=3
  cross sections:
    n  XLocPercent  YLocPercent  ZLocPercent  shape
    0  0            0            0            point
    1  0.001        0            0            circle Circle_Diameter=0.8
    2  0.999        0            0            as above
    3  1            0            0            point

Fuselage "Axle", child of "Gear_Strut"
  location (X Y Z) 104.5 16.5 -16.5, rotation 90 90 0; relative location 11.5 -1.5 0, rotation 0 0 90
  bounding box size 0.8 3.19401 0.8
  Design: Length=3
  cross sections:
    n  XLocPercent  YLocPercent  ZLocPercent  shape
    0  0            0            0            point
    1  0.001        0            0            circle Circle_Diameter=0.8
    2  0.999        0            0            as above
    3  1            0            0            point

Fuselage "Axle", child of "Gear_Strut"
  location (X Y Z) 109.5 16.5 -16.5, rotation 90 90 0; relative location 11.5 -1.5 5, rotation 0 0 90
  bounding box size 0.8 3.19401 0.8
  Design: Length=3
  cross sections:
    n  XLocPercent  YLocPercent  ZLocPercent  shape
    0  0            0            0            point
    1  0.001        0            0            circle Circle_Diameter=0.8
    2  0.999        0            0            as above
    3  1            0            0            point

Fuselage "Wheel", child of "RightGear"
  location (X Y Z) 99.5 18.6221 -16.5, rotation 0 0 90; relative location -5 0.62208 -11.5, rotation 0 0 90
  symmetric about XZ
  bounding box size 4.5 4.97664 4.5
  Design: Length=1.86624
  cross sections:
    n  XLocPercent  YLocPercent  ZLocPercent  shape
    0  0            0            0            point
    1  0.35         0            0            circle Circle_Diameter=4.5
    2  0.65         0            0            as above
    3  1            0            0            point

Fuselage "Wheel", child of "RightGear"
  location (X Y Z) 104.5 18.6221 -16.5, rotation 0 0 90; relative location 0 0.62208 -11.5, rotation 0 0 90
  symmetric about XZ
  bounding box size 4.5 4.97664 4.5
  Design: Length=1.86624
  cross sections:
    n  XLocPercent  YLocPercent  ZLocPercent  shape
    0  0            0            0            point
    1  0.35         0            0            circle Circle_Diameter=4.5
    2  0.65         0            0            as above
    3  1            0            0            point

Fuselage "Wheel", child of "RightGear"
  location (X Y Z) 109.5 18.6221 -16.5, rotation 0 0 90; relative location 5 0.62208 -11.5, rotation 0 0 90
  symmetric about XZ
  bounding box size 4.5 4.97664 4.5
  Design: Length=1.86624
  cross sections:
    n  XLocPercent  YLocPercent  ZLocPercent  shape
    0  0            0            0            point
    1  0.35         0            0            circle Circle_Diameter=4.5
    2  0.65         0            0            as above
    3  1            0            0            point
